// COMSOL Multiphysics 6.4.0.293 model "CEEF_corrected_baseline_only.mph"
// Outline of the model tree

Parameters
  lambda_K = 0.4389
  z1_Katt = 1.010618391165612
  z2_Katt = 0.3578492598195345
  sigma_M = 0.21318247317796932
  sigma_8 = 0.7415408989251597
  sigma_4 = 0.3
  z1_morula = 3.6329749865016776
  z2_morula = -0.2789502627913233
  z1_8cell = 0.2149713302685541
  z2_8cell = -0.14900846201927342
  z1_4cell = 0.5679629468508084
  z2_4cell = 0.5553733957457957
  z1_blast = 0.6060165759280406
  z2_blast = 1.53985085886147
  r_morula = 0.1421216487853129
  r_blast = 0.35650932484692965
  r_8cell = 0.4943605992834398
  g_zga = 0.0
  g_entry = 0.0
  g_exit = 0.0
  exit_sign = 1.0
  gamma_acc = 1.0
  gamma_closure = 1.0
  gamma_zga = 1.0
  gamma_re = 1.0
  gamma_de = 1.0
  vzga1 = -0.4480264141709743
  vzga2 = -0.8940203197942979
  ventry1 = 0.9992781411696675
  ventry2 = -0.03798942721987452
  vexit1 = -0.857164673208867
  vexit2 = 0.5150424477678865

Physics
  ge: GlobalEquations "全局常微分和微分代数方程"
    ge1: GlobalEquations "全局方程 1"
      name = {z1, z2}
      equation = {z1t-(-lambda_K*(z1-z1_Katt)+g_zga*flc2hs(t-3,0.3)*flc2hs(4-t,0.3)*gamma_zga*exp(-((z1-z1_4cell)^2+(z2-z2_4cell)^2)/(2*sigma_4^2))*vzga1+g_entry*flc2hs(t-4,0.3)*flc2hs(5-t,0.3)*(gamma_acc+gamma_closure)*exp(-((z1-z1_8cell)^2+(z2-z2_8cell)^2)/(2*sigma_8^2))*ventry1+g_exit*flc2hs(t-5,0.3)*flc2hs(6-t,0.3)*(gamma_re+gamma_de)*exp(-((z1-z1_morula)^2+(z2-z2_morula)^2)/(2*sigma_M^2))*exit_sign*vexit1), z2t-(-lambda_K*(z2-z2_Katt)+g_zga*flc2hs(t-3,0.3)*flc2hs(4-t,0.3)*gamma_zga*exp(-((z1-z1_4cell)^2+(z2-z2_4cell)^2)/(2*sigma_4^2))*vzga2+g_entry*flc2hs(t-4,0.3)*flc2hs(5-t,0.3)*(gamma_acc+gamma_closure)*exp(-((z1-z1_8cell)^2+(z2-z2_8cell)^2)/(2*sigma_8^2))*ventry2+g_exit*flc2hs(t-5,0.3)*flc2hs(6-t,0.3)*(gamma_re+gamma_de)*exp(-((z1-z1_morula)^2+(z2-z2_morula)^2)/(2*sigma_M^2))*exit_sign*vexit2)}
      initialValueU = {0.965613328639, 0.23476931019}
      initialValueUt = {0, 0}
      valueType = complex
      fieldName = ODE1
      DependentVariableQuantity = dimensionless
      CustomDependentVariableUnit = m
      SourceTermQuantity = dimensionless
      CustomSourceTermUnit = m

Studies
  std1 "研究 1"
    time: Transient "瞬态" | tlist = range(0,0.05,6); usertol = on; rtol = 1e-5

Solver configurations
  sol1 "解 1" (study std1)
    v1: Variables "因变量 1"
    t1: Time "瞬态求解器 1"
      dDef: Direct "直接"
      fc1: FullyCoupled "全耦合 1"

Datasets
  dset1: Solution | solution = sol1